// COMSOL Multiphysics 6.1.0.357 model "20210706_3D_galvo_current.mph"
// Outline of the model tree

Geometry
  geom1 "Geometry 1" (3D, length unit cm)
    imp3: Import
      type = cad
      filename = C:\Users\Daniellab\Documents\Nathan Belliveau\47mm Galvo_current_negative.dwg
      unit = source
      fillholes = on
    fin: Finalize "Form Union"

Materials
  mat1: Common "Water, liquid" on all domains
    def "Basic"
      dynamicviscosity = eta(T[1/K])[Pa*s]
      ratioofspecificheat = 1.0
      electricconductivity = 1.27[S/m]
      heatcapacity = Cp(T[1/K])[J/(kg*K)]
      density = rho(T[1/K])[kg/m^3]
      thermalconductivity = k(T[1/K])[W/(m*K)]
      soundspeed = cs(T[1/K])[m/s]
      relpermittivity = 80
      eta: Piecewise
        arg = T
        pieces = 
          {273.15, 413.15, 1.3799566804-0.021224019151*T^1+1.3604562827E-4*T^2-4.6454090319E-7*T^3+8.9042735735E-10*T^4-9.0790692686E-13*T^5+3.8457331488E-16*T^6}
          {413.15, 553.75, 0.00401235783-2.10746715E-5*T^1+3.85772275E-8*T^2-2.39730284E-11*T^3}
      Cp: Piecewise | arg = T; pieces = {273.15, 553.75, 12010.1471-80.4072879*T^1+0.309866854*T^2-5.38186884E-4*T^3+3.62536437E-7*T^4}
      rho: Piecewise | arg = T; pieces = {273.15, 553.75, 838.466135+1.40050603*T^1-0.0030112376*T^2+3.71822313E-7*T^3}
      k: Piecewise | arg = T; pieces = {273.15, 553.75, -0.869083936+0.00894880345*T^1-1.58366345E-5*T^2+7.97543259E-9*T^3}
      cs: Interpolation | table = {{273, 1403}, {278, 1427}, {283, 1447}, {293, 1481}, {303, 1507}, {313, 1526}, {323, 1541}, {333, 1552}, {343, 1555}, {353, 1555}, {363, 1550}, {373, 1543}}; interp = piecewisecubic

Physics
  ec: ConductiveMedia "Electric Currents" on all domains
    dependent variable V
    cucn1: CurrentConservation (default)
    ein1: ElectricInsulation (default)
    init1: init "Initial Values 1" (default)
    pot1: ElectricPotential on boundaries 51 | V0 = 53
    gnd1: Ground on boundaries 1

Mesh
  mesh1 "Mesh 1" (physics-controlled)

Studies
  std1 "Study 1"
    stat: Stationary

Solver configurations
  sol1 "Solution 1" (study std1)
  sol2 "Solution 2" (study std1)
    v1: Variables "Dependent Variables 1"
    s1: Stationary "Stationary Solver 1"
      fc1: FullyCoupled | linsolver = i1
      i1: Iterative | linsolver = cg
        mg1: Multigrid | prefun = amg; coarseningmethod = classic

Datasets
  dset1: Solution | solution = sol1
  dset2: Solution | solution = sol2
  cpl1: CutPlane | data = dset2; quickx = 4
  cpl2: CutPlane | data = dset1; quickplane = zx

Derived values
  int1: IntSurface "Surface Integration 1" on boundaries 51
    data = dset2
    table = tbl4
    expr = nx*ec.Jx+ny*ec.Jy+nz*ec.Jz
  int2: IntSurface "Surface Integration 2"
    data = cpl1
    table = tbl2
    expr = {cpl1nx*ec.Jx+cpl1ny*ec.Jy+cpl1nz*ec.Jz, , , , }

Tables
  tbl1: Table
    // Surface Integration 1
  tbl2: Table
    // Surface Integration 2
    cpl1nx*ec.Jx+cpl1ny*ec.Jy+cpl1nz*ec.Jz (A) | cpl1nx*ec.Jx+cpl1ny*ec.Jy+cpl1nz*ec.Jz (A)
    -2.23343 | -0.29779
  tbl3: Table
    // Volume Integration 3
  tbl4: Table
    // Surface Integration 1
    current (A) | current (A) | current (A) | current (A) | current (A) | current (A)
    0.297643 | 0.297643 | 0.000424458 | -0.297219 | 0.000693372 | -0.393815

Plots
  pg1: PlotGroup3D "Electric Potential (ec)" | data = dset2
    mslc1: Multislice | expr = V; xnumber = 0; ynumber = 0; multiplanezmethod = coord; zcoord = 0
      filt1: Filter | expr = (x^2 + y^2 < 0.0004)
    arwv1: ArrowVolume | expr = {ec.Ex, ec.Ey, ec.Ez}; xnumber = 20; ynumber = 20; arrowzmethod = coord; zcoord = 0
      filt1: Filter | expr = (x^2 + y^2 < 0.0004)
  pg2: PlotGroup3D "Electric fields (ec) 1 - USE" | data = dset2
    mslc1: Multislice | expr = ec.Ez; unit = mV/mm; xnumber = 0; ynumber = 0; multiplanezmethod = coord; zcoord = 0
      filt1: Filter | expr = (x^2 + y^2 < 0.0005)
    arwv1: ArrowVolume
      expr = {ec.Ex, ec.Ey, ec.Ez}
      xnumber = 20
      arrowymethod = coord
      ynumber = 20
      ycoord = 0
      arrowzmethod = coord
      zcoord = 0
      filt1: Filter | expr = (x^2 + y^2 < 0.00047)
  pg3: PlotGroup3D "current_density" | data = dset2
    mslc1: Multislice
      expr = ec.normJ
      unit = A/m^2
      descr = Current density norm
      xnumber = 0
      xcoord = 4.8
      ynumber = 0
      multiplanezmethod = coord
      znumber = 0
      zcoord = 0
      filt1: Filter | expr = (x^2 + y^2 < 0.0006)
  pg4: PlotGroup3D "Electric Potential (ec) - USE" | data = dset2
    slc1: Slice | expr = V- 33.0399007352; quickplane = xy; quickzmethod = coord; quickznumber = 0
      filt1: Filter | expr = (x^2 + y^2 < 0.00049)
  pg5: PlotGroup3D "Electric fields (ec) 1 - USE 1" | data = cpl2
    arwv1: ArrowVolume
      data = dset2
      expr = {ec.Ex, ec.Ey, ec.Ez}
      xnumber = 20
      arrowymethod = coord
      ynumber = 20
      ycoord = 0
      arrowzmethod = coord
      zcoord = 0
      filt1: Filter | expr = (x^2 + y^2 < 0.00047)